*Heading
** Job name: F4_vs_Wall Model name: F4
** Generated by: Abaqus/CAE 2021
*Preprint, echo=NO, model=NO, history=NO, contact=NO
**
** PARTS
**
*Part, name=Part-18
*Node
      1,           0.,  -937.287231,   4376.91943
      2,    257.64093,  -908.161438,        4379.
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*Element, type=S4R
1,   1,   2, 107, 110
2, 110, 107, 108, 109
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*Nset, nset=Set-2, generate
    1,  3638,     1
*Elset, elset=Set-2, generate
    1,  3630,     1
** Section: Section-1
*Shell Section, elset=Set-2, material=Aluminium, controls=EC-1
3., 5
*End Part
**
*Part, name=Part-19
*Node
      1,        5000.,        3000.,       15000.
      2,        5000.,        3000.,   15277.7773
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*Element, type=C3D8R
    1,   571,   572,   591,   590,     1,     2,    21,    20
    2,   572,   573,   592,   591,     2,     3,    22,    21
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*Nset, nset=Set-1, generate
     1,  21090,      1
*Elset, elset=Set-1, generate
     1,  18792,      1
** Section: Section-2
*Solid Section, elset=Set-1, controls=EC-2, material=Concrete
,
*End Part
**
**
** ASSEMBLY
**
*Assembly, name=Assembly
**
*Instance, name=Part-18-1, part=Part-18
          0.,           0.,        1000.
*End Instance
**
*Instance, name=Part-19-1, part=Part-19
          0.,        2000.,        5000.
*End Instance
**
*Nset, nset=Set-1, instance=Part-19-1
   552,   553,   554,   555,   556,   557
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*Elset, elset=Set-1, instance=Part-19-1
   505,   506,   507,   508,   509,   510
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*Nset, nset=Set-2, instance=Part-18-1, generate
    1,  3638,     1
*Elset, elset=Set-2, instance=Part-18-1, generate
    1,  3630,     1
*Nset, nset=s_Set-3, instance=Part-18-1, generate
    1,  3638,     1
*Elset, elset=s_Set-3, instance=Part-18-1, generate
    1,  3630,     1
*Elset, elset=_m_Surf-1_S2, internal, instance=Part-19-1, generate
   1,  522,    1
*Elset, elset=_m_Surf-1_S4, internal, instance=Part-19-1, generate
    18,  18792,     18
*Elset, elset=_m_Surf-1_S1, internal, instance=Part-19-1, generate
 18271,  18792,      1
*Elset, elset=_m_Surf-1_S6, internal, instance=Part-19-1, generate
     1,  18775,     18
*Elset, elset=_m_Surf-1_S3, internal, instance=Part-19-1
     1,     2,     3,     4,     5,     6
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*Elset, elset=_m_Surf-1_S5, internal, instance=Part-19-1
   505,   506,   507,   508,   509,   510
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*Surface, type=ELEMENT, name=m_Surf-1
_m_Surf-1_S2, S2
_m_Surf-1_S4, S4
_m_Surf-1_S6, S6
_m_Surf-1_S1, S1
_m_Surf-1_S3, S3
_m_Surf-1_S5, S5
*Elset, elset=_s_Surf-1_SNEG, internal, instance=Part-18-1, generate
    1,  3630,     1
*Surface, type=ELEMENT, name=s_Surf-1
_s_Surf-1_SNEG, SNEG
*End Assembly
**
** ELEMENT CONTROLS
**
*Section Controls, name=EC-1, ELEMENT DELETION=YES
1., 1., 1.
*Section Controls, name=EC-2, ELEMENT DELETION=YES
1., 1., 1.
**
** MATERIALS
**
*Material, name=Aluminium
*Damage Initiation, criterion=JOHNSON COOK
 0.096,  0.049,  3.465,  0.016,  1.099,   557.,     0., 0.0005
*Damage Evolution, type=ENERGY
0.,
*Density
 2.7e-09,
*Elastic
70000., 0.3
*Plastic, hardening=JOHNSON COOK
520., 477., 0.52,   1., 893.,   0.
*Material, name=Concrete
*Density
 2.4e-09,
*Elastic
20000., 0.2
*Concrete Damaged Plasticity
35.,  0.1, 1.16, 0.66,   0.
*Concrete Compression Hardening
    15.,       0.
 20.198,  7.5e-05
 30.001,  9.9e-05
 40.304, 0.000154
 50.008, 0.000762
 40.236, 0.002558
 20.236, 0.005675
  5.258, 0.011733
*Concrete Tension Stiffening
 1.999,       0.
 2.842,  0.00011
  1.87, 0.000211
 0.863, 0.000303
 0.226, 0.000691
 0.057, 0.001088
*Concrete Compression Damage
       0.,       0.
       0.,  7.5e-05
       0.,  9.9e-05
       0., 0.000154
       0., 0.000762
 0.195402, 0.002558
  0.59534, 0.005675
 0.894865, 0.011733
*Concrete Tension Damage
       0.,       0.
       0.,  0.00011
  0.34208, 0.000211
 0.696438, 0.000303
 0.920389, 0.000691
 0.980093, 0.001088
*Concrete Failure, TYPE=Strain
0.00108825908108108,0.011733119,0.980092892329345,0.894865033963175
**
** INTERACTION PROPERTIES
**
*Surface Interaction, name=IntProp-1
*Friction
0.,
*Surface Behavior, pressure-overclosure=HARD
**
** PREDEFINED FIELDS
**
** Name: Predefined Field-1   Type: Velocity
*Initial Conditions, type=VELOCITY
Set-2, 1, 0.
Set-2, 2, 0.
Set-2, 3, 222222.
**
** INTERACTIONS
**
** Interaction: Int-1
*Contact, op=NEW
*Contact Inclusions, ALL EXTERIOR
*Contact Property Assignment
 ,  , IntProp-1
** ----------------------------------------------------------------
**
** STEP: Step-1
**
*Step, name=Step-1, nlgeom=YES
*Dynamic, Explicit
, 1.
*Bulk Viscosity
0.06, 1.2
**
** BOUNDARY CONDITIONS
**
** Name: BC-1 Type: Displacement/Rotation
*Boundary
Set-1, 1, 1
Set-1, 2, 2
Set-1, 3, 3
Set-1, 4, 4
Set-1, 5, 5
Set-1, 6, 6
**
** OUTPUT REQUESTS
**
*Restart, write, number interval=1, time marks=NO
**
** FIELD OUTPUT: F-Output-1
**
*Output, field, time interval=0.0001
*Node Output
A, RF, U, V
*Element Output, directions=YES
DAMAGEC, DAMAGET, EVF, LE, PE, PEEQ, PEEQVAVG, PEVAVG, S, STATUS, SVAVG, TEMP
*Contact Output
CSTRESS,
**
** HISTORY OUTPUT: H-Output-1
**
*Output, history, variable=PRESELECT
*End Step
